// SBML level 3 version 1

model main()
  // model units - time: second, extent: mole

  // Compartments:
  compartment _comp = 1e-14 litre;

  // Species:
  species E in _comp = 5e-21/_comp;  // substance in mole
  species S in _comp = 1e-20/_comp;  // substance in mole
  species P in _comp = 0;  // substance in mole

  // Parameters:
  veq_koff = 0.2 per_second;
  veq_kon = 1000000 litre_per_mole_second;
  vcat_kcat = 0.1 per_second;

  // Reactions:
  veq_vcat: E + S => E + P; E*S*_comp*vcat_kcat*veq_kon/(vcat_kcat + veq_koff);

  // Unit definitions:
  unit per_second = 1 / second;
  unit litre_per_mole_second = litre / (mole * second);
end
